// COMSOL Multiphysics 5.5.0.359 model "1_HueschenPhillips_TonerTu_2DChannel.mph"
// Outline of the model tree

Parameters
  rho0 = 0.25[1/m^2]  // initial and mean density
  rhoc = 0.05[1/m^2]  // critical density
  alpha = 0.5[m^2/s]  // preferred speed coefficient 1
  beta = 0.1[s/m^2]  // preferred speed coefficient 2
  v0 = 1[m/s]  // initial velocity magnitude
  D = 10[m^2/s]  // neighbor coupling coefficient
  sigma = 10[m^4/s^2]  // pressure coefficient
  lambda = 1[1]  // velocity self-advection coefficient
  R = 30[m]  // obstacle radius

Functions
  rn1: Random "Random 1 - function to create disordered initial velocities" | nargs = 2; mean = pi; uniformrange = 2*pi; seed = 1

Geometry
  geom1 "Geometry 1" (2D, length unit m)
    r1: Rectangle | base = center; size = {500, 100}
    c5: Circle | r = R
    dif5: Difference | input = r1; input2 = c5
    fin: Finalize "Form Union"

Physics
  g: GeneralFormPDE "General Form PDE (velocity)" on domains 1
    dependent variable velocity = {v1, v2}
    ShapeProperty.order = 2
    Units.DependentVariableQuantity = none
    Units.CustomDependentVariableUnit = m/s
    Units.CustomSourceTermUnit = m/s^2
    gfeq1: GeneralFormPDE (default)
      f = {-sigma*rhox+alpha*(rho-rhoc)*v1-beta*(v1^2+v2^2)*v1-lambda*(v1*v1x+v2*v1y), -sigma*rhoy+alpha*(rho-rhoc)*v2-beta*(v1^2+v2^2)*v2-lambda*(v1*v2x+v2*v2y)}
      Ga = {{-D*v1x, -D*v1y}, {-D*v2x, -D*v2y}}
      da = {1, 0, 0, 1}
    zflx1: ZeroFluxBoundary "Zero Flux 1" (default)
    init1: init "Initial Values 1" (default)
      v1 = v0*cos(rn1(x,y))
      v2 = v0*sin(rn1(x,y))
      u1 = u0*cos(rn1(x,y))
      u2 = u0*sin(rn1(x,y))
    dir3: DirichletBoundary "Dirichlet Boundary Condition 2" on boundaries 2, 3, 5-8
      r = {0, 0}
      useDirichletCondition = {1, 1}
    pc1: PeriodicCondition on boundaries 1, 4 | PeriodicType = Continuity; destinationDomains: boundaries 4
  g2: GeneralFormPDE "General Form PDE (Continuity)" on domains 1
    dependent variable rho
    ShapeProperty.order = 1
    Units.DependentVariableQuantity = none
    Units.CustomDependentVariableUnit = 1/m^2
    Units.CustomSourceTermUnit = 1/(m^2*s)
    gfeq1: GeneralFormPDE (default) | f = -d(rho*v1,x)-d(rho*v2,y); Ga = {0, 0}; da = 1
    zflx1: ZeroFluxBoundary "Zero Flux 1" (default)
    init1: init "Initial Values 1" (default) | rho = rho0
    pc1: PeriodicCondition on boundaries 1, 4 | PeriodicType = Continuity; destinationDomains: boundaries 4

Mesh
  mesh1 "Mesh 1" (physics-controlled)
    size: MeshSizeDefault | hauto = 2

Studies
  std1 "Study 1"
    time: Transient "Time Dependent" | tlist = range(0,10,1e4)

Solver configurations
  sol1 "Solution 1" (study std1)
    v1: Variables "Dependent Variables 1"
    t1: Time "Time-Dependent Solver 1" | tlist = range(0,10,1e4)
      dDef: Direct
      fc1: FullyCoupled | linsolver = dDef

Datasets
  dset1: Solution | solution = sol1
  cln1: CutLine2D | data = dset1; genpoints = {{-200.186, 50.4765}, {-199.192, -49.1231}}

Plots
  pg1: PlotGroup2D "2D Plot Group 1 - velocity" | data = dset1
    surf1: Surface | expr = sqrt(v1^2+v2^2); unit = m/s
    arws1: ArrowSurface | expr = {v1, v2}; xnumber = 28; ynumber = 7
  pg2: PlotGroup2D "2D Plot Group 2 - density, with velocity arrows" | data = dset1
    surf1: Surface | expr = rho; unit = 1/m^2
    arws1: ArrowSurface | expr = {v1, v2}; maxpointcount = 10000; xnumber = 28; ynumber = 7
  pg3: PlotGroup1D "1D Plot Group - velocity(y)" | data = dset1
    lngr1: LineGraph | data = cln1; inputmode = linesecond; expr = sqrt(v1^2+v2^2)

Exports
  anim1: Animation "Animation - file velocity" | maxframes = 201; width = 1000; height = 300
  anim4: Animation "Animation - file density" | maxframes = 201; width = 1000; height = 300
  anim2: Animation "Animation - player velocity" | target = player; framesel = all; synchronize = off
  anim3: Animation "Animation - player density" | target = player; framesel = all; maxframes = 1001; synchronize = off
  plot1: Plot "Plot - velocity(y)" | multiplecurves = ascolumns