// COMSOL Multiphysics 5.5.0.359 model "4_HueschenPhillips_TonerTu_SphereWedgeInitialization.mph"
// Outline of the model tree

Parameters
  rho0 = 0.0625[1/m^2]  // initial and mean density. as noted in figure, value is lower than that used in other simulations in order to explore patch patterns.
  rho_c = 0.05[1/m^2]  // critical density
  alpha = 0.5[m^2/s]  // preferred speed coefficient 1
  beta = 0.1[s/m^2]  // preferred speed coefficient 2
  v0 = 1[m/s]  // initial velocity magnitude
  D = 10[m^2/s]  // neighbor coupling coefficient
  sigma = 10[m^4/s^2]  // pressure coefficient
  lambda = 1[1]  // velocity self-advection coefficient
  R = 100[m]  // radius of sphere
  eta = alpha*lambda/beta/sigma  // dimensionless parameter; see text and Shankar et al. 2017
  rhoTot = 4*pi*R^2*rho0  // integrated density (total number of wildebeest) on sphere

Functions
  rn1: Random | nargs = 3; mean = pi; uniformrange = 2*pi; seed = 621

Variables
  var1 "Variables 1"
    n1 = n_1  // normal vector component
    n2 = n_2  // normal vector component
    n3 = n_3  // normal vector component
    ndotv = sys1.e_n1*v1+sys1.e_n2*v2+sys1.e_n3*v3  // dot product of normal and velocity vector
    P11 = 1-n_1*n_1  // first of 9 components of projection operator, P
    P12 = -n_1*n_2
    P13 = -n_1*n_3
    P21 = -n_1*n_2
    P22 = 1-n_2*n_2
    P23 = -n_2*n_3
    P31 = -n_1*n_3
    P32 = -n_2*n_3
    P33 = 1-n_3*n_3
    Lv = sqrt(v1^2+v2^2+v3^2)  // magnitude of velocity vector
    G11 = dtang(v1,x)-n1*(n1*dtang(v1,x)+n2*dtang(v2,x)+n3*dtang(v3,x))  // first of 9 components of surface velocity gradient tensor, G
    G12 = dtang(v1,y)-n1*(n1*dtang(v1,y)+n2*dtang(v2,y)+n3*dtang(v3,y))
    G13 = dtang(v1,z)-n1*(n1*dtang(v1,z)+n2*dtang(v2,z)+n3*dtang(v3,z))
    G21 = dtang(v2,x)-n2*(n1*dtang(v1,x)+n2*dtang(v2,x)+n3*dtang(v3,x))
    G22 = dtang(v2,y)-n2*(n1*dtang(v1,y)+n2*dtang(v2,y)+n3*dtang(v3,y))
    G23 = dtang(v2,z)-n2*(n1*dtang(v1,z)+n2*dtang(v2,z)+n3*dtang(v3,z))
    G31 = dtang(v3,x)-n3*(n1*dtang(v1,x)+n2*dtang(v2,x)+n3*dtang(v3,x))
    G32 = dtang(v3,y)-n3*(n1*dtang(v1,y)+n2*dtang(v2,y)+n3*dtang(v3,y))
    G33 = dtang(v3,z)-n3*(n1*dtang(v1,z)+n2*dtang(v2,z)+n3*dtang(v3,z))

Couplings
  intop1: Integration on all boundaries

Coordinate systems
  sys1: Boundary "Boundary System 1"
  sys2: Spherical "Spherical System 2"

Geometry
  geom1 "Geometry 1" (3D, length unit m)
    sph1: Sphere | r = R
    fin: Finalize "Form Union"

Physics
  gb: GeneralFormBoundaryPDE "General Form Boundary PDE - velocity" on all boundaries
    dependent variable v = {v1, v2, v3}
    Units.DependentVariableQuantity = none
    Units.CustomDependentVariableUnit = m/s
    Units.CustomSourceTermUnit = m/s^2
    gfeq1: GeneralFormPDE (default)
      f = {-sigma*dtang(rho,x)-lambda*(v1*dtang(v1,x)+v2*dtang(v1,y)+v3*dtang(v1,z)-n1*(v1*n1*dtang(v1,x)+v1*n2*dtang(v2,x)+v1*n3*dtang(v3,x)+v2*n1*dtang(v1,y)+v2*n2*dtang(v2,y)+v2*n3*dtang(v3,y)+v3*n1*dtang(v1,z)+v3*n2*dtang(v2,z)+v3*n3*dtang(v3,z)))+(alpha*(rho-rho_c)-beta*Lv^2)*v1-D*(dtang(P11,x)*G11+dtang(P11,y)*G12+dtang(P11,z)*G13+dtang(P12,x)*G21+dtang(P12,y)*G22+dtang(P12,z)*G23+dtang(P13,x)*G31+dtang(P13,y)*G32+dtang(P13,z)*G33), -sigma*dtang(rho,y)-lambda*(v1*dtang(v2,x)+v2*dtang(v2,y)+v3*dtang(v2,z)-n2*(v1*n1*dtang(v1,x)+v1*n2*dtang(v2,x)+v1*n3*dtang(v3,x)+v2*n1*dtang(v1,y)+v2*n2*dtang(v2,y)+v2*n3*dtang(v3,y)+v3*n1*dtang(v1,z)+v3*n2*dtang(v2,z)+v3*n3*dtang(v3,z)))+(alpha*(rho-rho_c)-beta*Lv^2)*v2-D*(dtang(P21,x)*G11+dtang(P21,y)*G12+dtang(P21,z)*G13+dtang(P22,x)*G21+dtang(P22,y)*G22+dtang(P22,z)*G23+dtang(P23,x)*G31+dtang(P23,y)*G32+dtang(P23,z)*G33), -sigma*dtang(rho,z)-lambda*(v1*dtang(v3,x)+v2*dtang(v3,y)+v3*dtang(v3,z)-n3*(v1*n1*dtang(v1,x)+v1*n2*dtang(v2,x)+v1*n3*dtang(v3,x)+v2*n1*dtang(v1,y)+v2*n2*dtang(v2,y)+v2*n3*dtang(v3,y)+v3*n1*dtang(v1,z)+v3*n2*dtang(v2,z)+v3*n3*dtang(v3,z)))+(alpha*(rho-rho_c)-beta*Lv^2)*v3-D*(dtang(P31,x)*G11+dtang(P31,y)*G12+dtang(P31,z)*G13+dtang(P32,x)*G21+dtang(P32,y)*G22+dtang(P32,z)*G23+dtang(P33,x)*G31+dtang(P33,y)*G32+dtang(P33,z)*G33)}
      Ga = 
        {-D*(P11*G11+P12*G21+P13*G31), -D*(P11*G12+P12*G22+P13*G32), -D*(P11*G13+P12*G23+P13*G33)}
        {-D*(P21*G11+P22*G21+P23*G31), -D*(P21*G12+P22*G22+P23*G32), -D*(P21*G13+P22*G23+P23*G33)}
        {-D*(P31*G11+P32*G21+P33*G31), -D*(P31*G12+P32*G22+P33*G32), -D*(P31*G13+P32*G23+P33*G33)}
      da = 1
    init1: init "Initial Values 1" (default)
      v1 = v0*-y/sqrt(x^2+y^2+z^2)
      v2 = v0*x/sqrt(x^2+y^2+z^2)
      p1 = u0*-y/sqrt(x^2+y^2+z^2)
      p2 = u0*x/sqrt(x^2+y^2+z^2)
      p3 = 0
      u1 = u0*(cos(rn1(x,y,z))*sys1.e_t11+sin(rn1(x,y,z))*sys1.e_t21)
      u2 = u0*(cos(rn1(x,y,z))*sys1.e_t12+sin(rn1(x,y,z))*sys1.e_t22)
      u3 = u0*(cos(rn1(x,y,z))*sys1.e_t13+sin(rn1(x,y,z))*sys1.e_t23)
    wc1: WeakConstraint on all boundaries | constraintExpression = ndotv
  gb2: GeneralFormBoundaryPDE "General Form Boundary PDE - continuity" on all boundaries
    dependent variable rho
    ShapeProperty.order = 1
    Units.DependentVariableQuantity = none
    Units.CustomDependentVariableUnit = 1/m^2
    Units.CustomSourceTermUnit = 1/(m^2*s)
    gfeq1: GeneralFormPDE (default) | f = -dtang(rho*v1,x)-dtang(rho*v2,y)-dtang(rho*v3,z); Ga = {0, 0, 0}; da = 1
    init1: init "Initial Values 1" (default) | rho = 4*rho0
    gconstr1: GlobalConstraint | constraintExpression = intop1(rho)-rhoTot
    init2: init "Initial Values 2" on boundaries 3-8
  bode: BoundaryODE "Boundary ODEs and DAEs" on all boundaries
    dependent variable normalVector = {n_1, n_2, n_3}
    ShapeProperty.shapeFunctionType = shlag
    ShapeProperty.order = 2
    Units.CustomSourceTermUnit = 1
    dode1: DistributedODE (default) | f = {n_1-nx, n_2-ny, n_3-nz}; da = 0
    init1: init "Initial Values 1" (default) | n_1 = nx; n_2 = ny; n_3 = nz

Mesh
  mesh1 "Mesh 1" (physics-controlled)
    size: MeshSizeDefault | hauto = 2

Studies
  std1 "Study 1"
    param: Parametric "Parametric Sweep" (disabled)
      sweeptype = filled
      pname = sigma
      plistarr = 5,7.5,10,12.5,20,30
      punit = m^4/s^2
    time: Transient "Time Dependent" | tlist = range(0,200,2e4)

Solver configurations
  sol1 "Solution 1" (study std1)
    v1: Variables "Dependent Variables 1"
    t1: Time "Time-Dependent Solver 1" | tlist = range(0,200,2e4)
      dDef: Direct
      fc1: FullyCoupled | linsolver = dDef
  sol2 "Parametric Solutions 1" (study std1)

Datasets
  dset1: Solution | solution = sol1
  cln1: CutLine3D | data = dset1; genpoints = {{341.694, -325.1, 163.966}, {0, 0, 500}}
  dset2: Solution | solution = sol2
  cln2: CutLine3D | data = dset2; genpoints = {{0.292878, -99.982, 0.146444}, {0, 0, 100}}

Evaluation groups
  eg1: EvaluationGroup | data = dset2; filename = /Users/Christina/Downloads/rhoInt.txt
    int1: IntSurface "Surface Integration 1" on boundaries 1-8 | expr = {p1, p2, p3, rho, n_1, n_2, n_3}

Plots
  pg5: PlotGroup3D "Density, rho" | data = dset1
    surf1: Surface "Surface 1 - density" | expr = rho; unit = 1/m^2
    arws1: ArrowSurface "Arrow Surface 1 - velocity" | expr = {v1, v2, v3}
  pg1: PlotGroup3D "Velocity, v" | data = dset1
    surf1: Surface "Surface 1 - speed" | expr = sqrt(v1^2+v2^2+v3^2); unit = m/s
    arws2: ArrowSurface "Arrow Surface 1 - velocity" | expr = {v1, v2, v3}
  pg10: PlotGroup1D "1D Plot Group - density(phi)" | data = dset1
    lngr1: LineGraph on edges 1, 4, 7, 12 | expr = rho

Exports
  anim2: Animation "velocity player" | target = player; framesel = all; synchronize = off
  anim3: Animation "density player" | target = player; framesel = all; maxframes = 101; frametime = 0.2; synchronize = off
  anim1: Animation "density file" | framesel = all; width = 1000; height = 1000; synchronize = off
  anim6: Animation "line plot - density(phi) gif player" | target = player; framesel = all
  plot2: Plot "line plot - density(phi) text file" | multiplecurves = ascolumns